founder(where, sk) :=
    flag ← 1
    i ← 0
    while flag == 1
        result ← transpose(sk(where))
        buf ← result[0]
        R[i] ← buf(0)
        i ← i + 1
        buf ← result[1]
        flag ← length(result) > 1
        if flag == 1
            buf ← result[2]
            sk ← buf(2)
    R  # error: This value has the form: ƒ(any1) → [ƒ(Unitless) → any2], but must have the form: any1.
wrap(v, t) := v
seeker1(from, next) := [wrap(from[1]), wrap(next)]
seeker1(from) := [wrap(from[1])]
source := [1; 2; 3; 4; 5]
test := [1, 3, 9]
result := transpose(seeker1(source))[0]
p := transpose(test)
result(1) = 2
p[0] = 1
result ← transpose(seeker1(source))
founder(source, seeker1, seeker1) =  # error: This variable is undefined.
result[0] =  # error: This value must be an array.
