# [area: UTIL]
flatHorizontalMatrix(size) :=
    empty(i, j) ← 0
    matrix(1, size, empty)
abs(v) :=
    v if v ≥ 0
    (-v) otherwise
l(set) := length(set)
absArray(v) :=
    for i ∈ 0 .. l(v) - 1
        R[i] ← abs(v[i])
    R
flatVerticalMatrix(size) :=
    empty(i, j) ← 0
    matrix(size, 1, empty)
maxDiff(set1, set2) :=
    l1 ← l(set1)
    l2 ← l(set1)
    min ← set1[0] - set2[0]
    max ← min
    size ← l1
    size ← l2 if l2 < l1
    for i ∈ 0 .. size - 1
        d ← set1[i] - set2[i]
        min ← d if d < min
        max ← d if d > max
    return min if abs(min) ≥ abs(max)
flatArray(source) :=
    last ← 0
    for m ∈ source
        for i ∈ m
            R[last] ← i
            last ← last + 1
    R
forSubSet(set, fun) :=
    for i ∈ 0 .. l(set) - 1
        R[i] ← fun(set[i])
    R
arrayMean(set) := mean(set)
arrayVar(set) := var(set)
inc(source, value) := source + value
inc1(source) := inc(source, 1)
arrayStdev(set) := stdev(set)
dc(souce, value) := souce - value
myltiSetIterator(to, fun) :=
    last ← 0
    for i ∈ 0 .. to - 1
        for j ∈ i .. to - 1
            R[last] ← fun(i, j)
            last ← inc1(last)
    R
uniqueItemSetIterator(to, fun) :=
    last ← 0
    for i ∈ 0 .. to - 2
        for j ∈ i + 1 .. to - 1
            R[last] ← fun(i, j)
            last ← inc1(last)
    R
# [area: ms_Tools]
meanMultyDimens(set) :=
    size ← l(set)
    dimesn ← l(set[0])
    R[dimesn - 1] ← 0
    for i ∈ set
        R ← R + i
    R ← R/size
varMultyDimens(set) :=
    E ← meanMultyDimens(set)
    size ← l(set)
    dimesn ← l(set[0])
    R[dimesn - 1] ← 0
    for i ∈ set
        R ← R + (i - E)^2
    R ← R/size
covvariatons(set1, set2) :=
    S ← min(l(set1), l(set2))
    E1 ← mean(set1)
    E2 ← mean(set2)
    R ← 0
    sum((set1[i] - E1)*(set2[i] - E2), i = 0 .. S - 1)/S
covvariatonMatrix(set) :=
    subsetCount ← l(set)
    if subsetCount < 2
        {
            return [0]
        }
    subFun(first, second) ← covvariatons(set[first], set[second])
    covvSet ← myltiSetIterator(subsetCount, subFun)
    offset ← 0
    for n ∈ 0 .. subsetCount - 1
        for m ∈ n .. subsetCount - 1
            R[m, n] ← covvSet[offset + m]
            R[n, m] ← R[m, n]
        offset ← inc(offset, subsetCount - n - 1)
    R
corrMatrix(set) :=
    covvMatrix ← covvariatonMatrix(set)
    if rows(covvMatrix) < 2
        {
            return [0]
        }
    stdevs ← forSubSet(set, arrayStdev)
    subsetCount ← l(set)
    for n ∈ 0 .. subsetCount - 1
        for m ∈ n .. subsetCount - 1
            R[m, n] ← covvMatrix[m, n]/(stdevs[n]*stdevs[m])
            R[n, m] ← R[m, n]
    R
getUniqueCorrelation(set) :=
    subsetCount ← l(set)
    stdevs ← forSubSet(set, arrayStdev)
    subFun(first, second) ← covvariatons(set[first], set[second])/(stdev(set[first])*stdev(set[second]))
    uniqueItemSetIterator(subsetCount, subFun)
regresionParams(set) :=
    subsetCount ← l(set)
    subsetSize ← l(set[0])
    corrSet ← getUniqueCorrelation(set)
    means ← forSubSet(set, arrayMean)
    stdevs ← forSubSet(set, arrayStdev)
    indexFun(a, b) ←
        R[0] ← a
        R[1] ← b
        R
    indexesSet ← uniqueItemSetIterator(subsetCount, indexFun)
    for i ∈ 0 .. l(corrSet) - 1
        index ← indexesSet[i]
        f ← index[0]
        s ← index[1]
        V[0] ← corrSet[i]*stdevs[f]/stdevs[s]
        V[1] ← means[f] - means[s]*V[0]
        R[i*2] ← V[0]
        R[i*2 + 1] ← V[1]
    R
checkCorrelation(set) :=
    subsetSize ← l(set[0])
    corrSet ← getUniqueCorrelation(set)
    for i ∈ 0 .. l(corrSet) - 1
        R[i] ← corrSet[i]/sqrt(1 - (corrSet[i]^2))*sqrt(subsetSize - 2)
    R
# [area: Decorators]
decorMatrix(names, set) :=
    R[0, 0] ← "#"
    for i ∈ 1 .. rows(set)
        R[0, i] ← names[i - 1]
        R[i, 0] ← names[i - 1]
    for n ∈ 0 .. rows(set) - 1
        for m ∈ 0 .. cols(set) - 1
            R[n + 1, m + 1] ← set[n, m]
    R
decorLiner(names, set) :=
    for i ∈ 0 .. l(set) - 1
        R[0, i] ← names[i]
        R[1, i] ← set[i]
    R
checkCorrelationWithDecor(names, set, α) :=
    checkResult ← checkCorrelation(set)
    setSize ← l(set[0])
    Ktabl ← qt(1 - α, sqrt(setSize - 2))
    nameGenerator(i, j) ← concat(names[i], " vs ", names[j])
    lagend ← uniqueItemSetIterator(l(names), nameGenerator)
    for i ∈ 0 .. l(checkResult) - 1
        R[i + 1, 0] ← lagend[i]
        R[i + 1, 1] ← checkResult[i]
        R[i + 1, 2] ← "yes" if checkResult[i] < Ktabl
        R[i + 1, 2] ← "name" otherwise
    R[0, 0] ← "sets"
    R[0, 1] ← "observe value"
    R[0, 2] ← concat("H0 сorrelate with α = ", num2str(α))
    R
getLinerRefresionWithDecor(names, set) :=
    regresion ← regresionParams(set)
    setSize ← l(set[0])
    nameGenerator(i, j) ← concat(names[i], " vs ", names[j])
    lagend ← uniqueItemSetIterator(l(names), nameGenerator)
    for i ∈ 0 .. l(regresion)/2 - 1
        R[i + 1, 0] ← lagend[i]
        R[i + 1, 1] ← regresion[i*2]
        R[i + 1, 2] ← regresion[i*2 + 1]
    R[0, 0] ← "sets"
    R[0, 1] ← "K"
    R[0, 2] ← "B"
    R
getCorriliationField(set) :=
    nameGenerator(i, j) ← [set[i]; set[j]]
    uniqueItemSetIterator(l(set), nameGenerator)
getPlots(set) :=
    regresion ← regresionParams(set)
    fun(k, b, x) ← k*x + b
    for i ∈ 0 .. l(regresion)/2 - 1
        R[i] ← fun(regresion[i*2], regresion[i*2 + 1])
    R
# [area: Data Load]
# [component: outputs fileData]
fileRows := l(fileData[:, 0])
setCount := cols(fileData)
names := ["X"; "Y"; "Z"]
multidimenRaw :=
    for i ∈ 0 .. fileRows - 1
        R[i] ← [fileData[:, 0][i]; fileData[:, 1][i]; fileData[:, 2][i]]
    R
multiSetRaw :=
    R[0] ← fileData[:, 0]
    R[1] ← fileData[:, 1]
    R[2] ← fileData[:, 2]
    R
# [area: Tasks]
# 1:
decorLiner(names, meanMultyDimens(multidimenRaw)) = ["X", "Y", "Z"; 3.96, 7.22, 5.7]
# 2:
decorLiner(names, varMultyDimens(multidimenRaw)) = ["X", "Y", "Z"; 29.4384, 27.9316, 25.93]
# 3:
decorMatrix(names, covvariatonMatrix(multiSetRaw)) = [
    "#", "X", "Y", "Z";
    "X", 29.4384, 8.4088, -12.992;
    "Y", 8.4088, 27.9316, -8.894;
    "Z", -12.992, -8.894, 25.93
]
# 4:
decorMatrix(names, corrMatrix(multiSetRaw)) = [
    "#", "X", "Y", "Z";
    "X", 1, 0.293244, -0.470238;
    "Y", 0.293244, 1, -0.330482;
    "Z", -0.470238, -0.330482, 1
]
# 5:
# [component: outputs α]
α := str2num(α)
checkCorrelationWithDecor(names, multiSetRaw, α) = [
    "sets", "observe value", "H0 сorrelate with α = 0.025";
    "X vs Y", 2.12508, "yes";
    "X vs Z", -3.69151, "yes";
    "Y vs Z", -2.42596, "yes"
]
# 6:
getLinerRefresionWithDecor(names, multiSetRaw) = [
    "sets", "K", "B";
    "X vs Y", 0.30105, 1.78642;
    "X vs Z", -0.501041, 6.81594;
    "Y vs Z", -0.343, 9.1751
]
# 7:
fields := getCorriliationField(multiSetRaw)
plots := getPlots(multiSetRaw)
fun := plots[0]
field := fields[0]
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fun := plots[1]
field := fields[1]
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fun := plots[2]
field := fields[2]
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