'
BernulaP := 0.6
bernula(X) :=
    BernulaP if X == 1
    (1 - BernulaP) if X == 0
normal(x, δ, μ) := e^(-((x - μ)^2)/(2*δ^2))/(δ*sqrt(2*π))
Bernula(X) :=
    0 if X < 0
    (1 - BernulaP) if X < 1 and X ≥ 0
    1 if X ≥ 1
Normal(X, δ, μ) := integral(normal(t, δ, μ), t = -∞ .. X)
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H(x) := integral(t^(x - 1)*e^(-t), t = 0 .. ∞)
student(x, n) := H((n + 1)/2)/(sqrt(π*n)*H(n/2)*(1 + (x^2)/n)^((n + 1)/2))
Student(x, n) := integral(student(t, n), t = -∞ .. x)
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