histoItemCount := 15
setSize := 100000
minMax(data) :=
    min ← data[0]
    max ← data[0]
    for i ∈ data
        min ← i if (i < min)
        max ← i if (i > max)
    R[0] ← min
    R[1] ← max
    R
E(data) := sum(data[i], i = 0 .. length(data) - 1)/length(data)
D(data) :=
    mean ← E(data)
    sum ← sum((data[i] - mean)^2, i = 0 .. length(data) - 1)
    sum/length(data)
prepareData(data) :=
    mean ← E(data)
    d ← D(data)
    c ← 0
    from ← mean - 3*d
    to ← mean + 3*d
    for i ∈ data
        if ((i > from) and (i < to))
            R[c] ← i
            c ← c + 1
    R
grouping(size, data, operator) :=
    min_max ← minMax(data)
    min ← min_max[0]
    max ← min_max[1]
    for i ∈ 0 .. size
        Result[i] ← 0
    itemSize ← 1 if min == max
    itemSize ← (max - min)/size otherwise
    for i ∈ data
        index ← round((i - min)/itemSize, 0)
        Result[index] ← operator(Result[index], i)
    Result
clearEmptyItem(data) :=
    Result
    c ← 0
    for i ∈ data
        if i > 0
            Result[c] ← i
            c ← c + 1
    Result
gista(state, value) := state + 1
cumula(state, value) := state + value
dist(size, data) := grouping(size, data, gista)
comulaDist(size, data) :=
    values ← grouping(size, data, cumula)
    for i ∈ 1 .. length(values) - 1
        values[i] ← values[i - 1] + values[i]
    values
distWithPreparing(size, data) := dist(size, prepareData(data))
comulaDistWithPreparing(size, data) := comulaDist(size, prepareData(data))
# паттерн - список, де 0 - позначення данних, відємне - значення модуля індексу данних, натуральне число - одиничний відступ
decorateDist(data, size, pattern, filler) :=
    lastAddItem ← 0
    patternSize ← length(pattern)
    dataSize ← length(data)
    for id ∈ 0 .. size - 1
        i ← mod(id, patternSize)
        if pattern[i] == 0
            A[id] ← data[mod(lastAddItem, dataSize)]
            lastAddItem ← lastAddItem + 1
            continue
        if pattern[i] > 0
            A[id] ← filler
            continue
        A[id] ← data[pattern[i]*(-1)]
    A
a := 0
b := 10
evenDist(size) := runif(size, a, b)
i := 0 .. histoItemCount
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δ := 1
μ := 5
normalDist(size) := rnorm(size, μ, δ)
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d1 := 4 = 4
d2 := 10000
FDist(size) := rF(size, d1, d2)
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p := 0.55
q := 1 - p
pattern :=
    for i ∈ 0 .. 5
        Re[i] ← 1
    Re[6] ← 0
    Re[7] ← 1
    Re[8] ← 0
    for i ∈ 9 .. 14
        Re[i] ← 1
    Re
BernoulliDist(size) :=
    k ← 1000
    baseSet ← runif(size, 0, k)
    fixP ← p*k
    fixQ ← q*k
    Result
    for i ∈ 0 .. length(baseSet) - 1
        Result[i] ← 1 if baseSet[i] < fixP
        Result[i] ← 0 otherwise
    Result
bernuliD(size, histoItemCount) := clearEmptyItem(dist(histoItemCount, BernoulliDist(size)))
bernulliGista(size, histoItemCount) := decorateDist(bernuliD(size, histoItemCount), 20, pattern, 0)
comulaDistForFisher(size, data) :=
    values ← grouping(size, data, gista)
    for i ∈ 1 .. length(values) - 1
        values[i] ← values[i - 1] + values[i]
    values
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