meanDGenerator(set, fun1) :=
    sumX ← 0
    sumQuadroX ← 0
    for i ∈ 0 .. length(set) - 1
        sumX ← sumX + set[i]
        sumQuadroX ← sumQuadroX + set[i]^2
        E ← sumX/(i + 1)
        D ← (sumQuadroX - 2*sumX*E)/(i + 1) + E^2
        State[:, i] ← fun1(E, D)
        D[:, i] ← sumX
    transpose(State)
setSize := 100
i := 1 .. setSize
set := rnorm(setSize, 5, 2)
generateFun(E, D) :=
    R[0] ← E
    R[1] ← sqrt(D)
    R
comapreResult := meanDGenerator(set, generateFun)
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set := runif(setSize, 0, 10)
generateFun(E, D) :=
    R[1] ← E - sqrt(3*D)
    R[0] ← 2*E - R[1]
    R
comapreResult := meanDGenerator(set, generateFun)
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set := rgamma(setSize, 5)
generateFun(E, D) :=
    R[0] ← E
    R
comapreResult = [
    0.496303, 0.496303;
    3.37281, -0.274455;
    10.2432, -2.20883;
    10.7566, -1.0886;
    9.98812, -0.679438;
    11.0168, -0.246691;
    10.4632, -0.122857;
    10.0048, -0.0730626;
    10.1822, 0.302312;
    10.2755, 0.639458
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]
comapreResult := meanDGenerator(set, generateFun)
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set := rpois(setSize, 5)
comapreResult := meanDGenerator(set, generateFun)
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