check(setSize, set, original, checkFun) :=
    for i ∈ 1 .. setSize
        R[i - 1] ← |original - checkFun(set, i)|
    R
setOf2Args(setSize, generutorFun, params, original, checkFun) := check(setSize, generutorFun(setSize, params[0]), original, checkFun)
setOf3Args(setSize, generutorFun, params, original, checkFun) := check(setSize, generutorFun(setSize, params[0], params[1]), original, checkFun)
dispersion(set, size) :=
    m ← mean(set, size)
    sum((set[i] - m)^2, i = 0 .. size - 1)/size
mean(set, size) := sum(set[i], i = 0 .. size - 1)/size
maxSize := 100
i := 1 .. maxSize
checkWithSize2(generutorFun, params, original, checkFun) := setOf2Args(maxSize, generutorFun, params, original, checkFun)
checkWithSize3(generutorFun, params, original, checkFun) := setOf3Args(maxSize, generutorFun, params, original, checkFun)  # '
a := 0
b := 10
m := (b - a)/2
d := (a - b)^2/12
currentCheck(value, checkF) := checkWithSize3(runif, transpose([a, b]), value, checkF)
MCheck := currentCheck(m, mean)
DCheck := currentCheck(d, dispersion)
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m := 10
d := 2
currentCheck(value, checkF) := checkWithSize3(rnorm, transpose([m, d]), value, checkF)
MCheck := currentCheck(m, mean)
DCheck := currentCheck(d, dispersion)
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k := 5
m := k
d := k
currentCheck(value, checkF) := checkWithSize2(rgamma, [k], value, checkF)
MCheck := currentCheck(m, mean)
DCheck := currentCheck(d, dispersion)
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λ := 5
m := λ
d := λ
currentCheck(value, checkF) := checkWithSize2(rpois, [k], value, checkF)
MCheck := currentCheck(m, mean)
DCheck := currentCheck(d, dispersion)
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