getCurve(points, scale) :=
    for i ∈ 0 .. length(points) - 2
        R[i, 0] ← (points[i] - points[i + 1])/(scale[i] - scale[i + 1])
        R[i, 1] ← points[i] - R[i, 0]*scale[i]
    R
meanDGenerator(set, fun1) :=
    sumX ← 0
    sumQuadroX ← 0
    E ← set[0]
    D ← 0
    State[:, 0] ← fun1(E, D)
    for i ∈ 1 .. length(set) - 1
        sumX ← sumX + set[i]
        sumQuadroX ← sumQuadroX + set[i]^2
        E ← (E*i + set[i])/(i + 1)
        D ← (sumQuadroX - 2*sumX*E)/(i + 1) + E^2
        State[:, i] ← fun1(E, D)
    transpose(State)
curve(indexFun, putsInfo, x) :=
    index ← indexFun(x)
    putsInfo[index, 0]*x + putsInfo[index, 1]
meanVarSaver(E, D) :=
    R[0] ← E
    R[1] ← D
    R
setSize := 100
i := 0, 1 .. setSize - 1
αSize := 30
αToPos(a) := floor((a*100) - 1)
α :=
    for i ∈ 1 .. αSize
        R[i - 1] ← i/100
    R
getLimist(set, a) :=
    E ← mean(set)
    n ← length(set)
    meanK ← stdev(set)/sqrt(n)
    varK ← var(set)*n
    aCoun ← length(a)
    for i ∈ 0 .. aCoun - 1
        R[i, 0] ← E + qt(a[i]/2, n)*meanK
        R[i, 1] ← E + qt(1 - a[i]/2, n)*meanK
        R[i, 2] ← varK/qchisq(1 - a[i]/2, n)
        R[i, 3] ← varK/qchisq(a[i]/2, n)
    R
unifA := 0
unifB := 15
normalE := 10
normalD := 3
gammaS := 2
meanDGenerator(unifSet, meanVarSaver)
poisλ := 4
unifSet := runif(setSize, unifA, unifB)
unifParams := meanDGenerator(unifSet, meanVarSaver)
normalSet := rnorm(setSize, normalE, normalD)
normalParams := meanDGenerator(normalSet, meanVarSaver)
gammaSet := rgamma(setSize, gammaS)
gammaParams := meanDGenerator(gammaSet, meanVarSaver)
poisSet := rpois(setSize, poisλ)
poisParams := meanDGenerator(poisSet, meanVarSaver)
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unifLimits := getLimist(unifSet, α)
normalLimits := getLimist(normalSet, α)
gammaLimits := getLimist(gammaSet, α)
poisLimits := getLimist(poisSet, α)
setLimit := unifLimits
set := unifSet
ELimitDow := getCurve(setLimit[:, 0], α)
ELimitUp := getCurve(setLimit[:, 1], α)
E := mean(set)
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VLimitDow := getCurve(setLimit[:, 2], α)
VLimitUp := getCurve(setLimit[:, 3], α)
V := var(set)
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setLimit := normalLimits
set := normalSet
ELimitDow := getCurve(setLimit[:, 0], α)
ELimitUp := getCurve(setLimit[:, 1], α)
E := mean(set)
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VLimitDow := getCurve(setLimit[:, 2], α)
VLimitUp := getCurve(setLimit[:, 3], α)
V := var(set)
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setLimit := gammaLimits
set := gammaSet
ELimitDow := getCurve(setLimit[:, 0], α)
ELimitUp := getCurve(setLimit[:, 1], α)
E := mean(set)
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VLimitDow := getCurve(setLimit[:, 2], α)
VLimitUp := getCurve(setLimit[:, 3], α)
V := var(set)
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setLimit := poisLimits
set := poisSet
ELimitDow := getCurve(setLimit[:, 0], α)
ELimitUp := getCurve(setLimit[:, 1], α)
E := mean(set)
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VLimitDow := getCurve(setLimit[:, 2], α)
VLimitUp := getCurve(setLimit[:, 3], α)
V := var(set)
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