checkE(set, a) :=
    E ← mean(set)
    n ← length(set)
    meanK ← stdev(set)/sqrt(n)
    from ← E + qt(a/2, n)*meanK
    to ← E + qt(1 - a/2, n)*meanK
    R[0] ← from
    R[1] ← to
    R
checkV(set, a) :=
    n ← length(set)
    varK ← var(set)*n
    from ← varK/qchisq(1 - a/2, n)
    to ← varK/qchisq(a/2, n)
    R[0] ← from
    R[1] ← to
    R
setsParams(set1, set2) :=
    E1 ← mean(set1)
    E2 ← mean(set2)
    L1 ← length(set1)
    L2 ← length(set2)
    V1 ← var(set1)
    V2 ← var(set2)
    result ← [E1, E2, L1, L2, L1 + L2, V1, V2]
    result
getCurve(points, scale) :=
    for i ∈ 0 .. length(points) - 2
        R[i, 0] ← (points[i] - points[i + 1])/(scale[i] - scale[i + 1])
        R[i, 1] ← points[i] - R[i, 0]*scale[i]
    R
curve(indexFun, putsInfo, x) :=
    index ← indexFun(x)
    return NaN if index == NaN
    putsInfo[index, 0]*x + putsInfo[index, 1]
getHistoIndex(points, point) :=
    return NaN if point < points[0]
    R ← 0
    for i ∈ points
        if point < i
            R ← R - 1
            {
                break
            }
        R ← R + 1
    R
histo(size, set) :=
    h ← histogram(size, set)
    sum ← sum(h[i, 1], i = 0 .. rows(h) - 1)
    for i ∈ 0 .. rows(h) - 1
        h[i, 1] ← h[i, 1]/sum
    h
verticalLine(point, value, sensitiv, x) :=
    return NaN if |x - point| < sensitiv
    value
filling(a, b, exeptFun, f, x) :=
    return NaN if exeptFun(x)
    v ← f(x)
    v if v > 0
    NaN otherwise
exceptInterval(a, b, x) := (a > x) or (x > b)
exceptRight(a, x) := a > x
exceptLeft(a, x) := a < x
tCriterion(set1, set2, α) :=
    [E1, E2, L1, L2, L, V1, V2] ← setsParams(set1, set2)
    criterion ← (E1 - E2)/sqrt(((L1*V1 + L2*V2)/(L - 2))*(1/L1 + 1/L2))
    qt(1 - α/2, L - 2)
    down ← qt(α, L - 2)
    up ← -down if down < 0
    otherwise
        up ← down
        down ← -down
    [criterion, down, up]
fCreterion(set1, set2, α) :=
    [E1, E2, L1, L2, L, V1, V2] ← setsParams(set1, set2)
    criterion ← V1/V2
    trace("criterion={0},V1={1},V2={2}", criterion, V1, V2)
    down ← qF(α/2, L1 - 1, L2 - 1)
    up ← qF(1 - α/2, L1 - 1, L2 - 1)
    [criterion, down, up]
N := 500
normalE := 10
normalδ := 2
normalSet := rnorm(N, normalE, normalδ)
normalPlotSet := rnorm(100000, normalE, normalδ)
normalHisto := histo(50, normalPlotSet)
normalCurve := getCurve(normalHisto[:, 1], normalHisto[:, 0])
normalGraph := curve(getHistoIndex(normalHisto[:, 0]), normalCurve)
normalGraph(x) := dnorm(x, normalE, normalδ)
watchE := mean(normalSet)
# [component: outputs setedE]
# [component: outputs setedV]
# [component: outputs α]
setedE := str2num(setedE)
setedV := str2num(setedV)
α := str2num(α)
interval := checkE(normalSet, α)
interval = [9.65672; 9.88489]
intervalFillL := filling(interval[0], interval[1], exceptLeft(interval[0]), normalGraph)
intervalFillR := filling(interval[0], interval[1], exceptRight(interval[1]), normalGraph)
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interval := checkV(normalSet, α)
V := var(normalSet)
checkVFrom := normalE - setedV/2
checkVTo := normalE + setedV/2
checkV := filling(checkVFrom, checkVTo, exceptInterval(checkVFrom, checkVTo), normalGraph)
checkVFrom := normalE - interval[1]/2
checkVTo := normalE - interval[0]/2
intervalFillL := filling(checkVFrom, checkVTo, exceptInterval(checkVFrom, checkVTo), normalGraph)
checkVTo := normalE + interval[1]/2
checkVFrom := normalE + interval[0]/2
intervalFillR := filling(checkVFrom, checkVTo, exceptInterval(checkVFrom, checkVTo), normalGraph)
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EHConclusion(criteria, down, up) :=
    return "Справедлива гипотиза Н0 - матожидания равны" if (criteria > down) and (criteria < up)
    "Справедлива гипотиза Н1 - первое мат ожидание меньше второго" if criteria < 0
    "Справедлива гипотиза Н2 - первое мат ожидание больше второго" otherwise
dtFun(size, x) := dt(x, size)
dFFun(d1, d2, x) := dF(x, d1, d2)
VHConclusion(criteria, down, up) :=
    return "Справедлива гипотиза Н0 - дисперсии равны" if (criteria > down) and (criteria < up)
    "Справедлива гипотиза Н1 - первоая дисперсия меньше второй" if criteria < 1
    "Справедлива гипотиза Н2 - первоая дисперсия  больше второй" otherwise
# [component: outputs α]
# [component: outputs chiK2]
# [component: outputs N1]
# [component: outputs N2]
# [component: outputs chiK1]
chiK2 := str2num(chiK2)
N1 := str2num(N1)
chiK1 := str2num(chiK1)
N2 := str2num(N2)
α := str2num(α)
NSum := N1 + N2 - 2
chiSet1 := rchisq(N1, chiK1)
chiSet2 := rchisq(N2, chiK2)
[tCriterion, tDown, tUp] := tCriterion(chiSet1, chiSet2, α)
check := filling(tDown, tUp, exceptInterval(tDown, tUp), dtFun(NSum))
EHConclusion(tCriterion, tDown, tUp) = "Справедлива гипотиза Н0 - матожидания равны"
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[fCriterion, fDown, fUp] := fCreterion(chiSet1, chiSet2, α)
check := filling(fDown, fUp, exceptInterval(fDown, fUp), dFFun(N1 - 1, N2 - 1))
VHConclusion(fCriterion, fDown, fUp) = "Справедлива гипотиза Н0 - дисперсии равны"
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