# [area: UTIL]
flatHorizontalMatrix(size) :=
    empty(i, j) ← 0
    matrix(1, size, empty)
abs(v) :=
    v if v ≥ 0
    (-v) otherwise
l(set) := length(set)
absArray(v) :=
    for i ∈ 0 .. l(v) - 1
        R[i] ← abs(v[i])
    R
flatVerticalMatrix(size) :=
    empty(i, j) ← 0
    matrix(size, 1, empty)
maxDiff(set1, set2) :=
    l1 ← l(set1)
    l2 ← l(set1)
    min ← set1[0] - set2[0]
    max ← min
    size ← l1
    size ← l2 if l2 < l1
    for i ∈ 0 .. size - 1
        d ← set1[i] - set2[i]
        min ← d if d < min
        max ← d if d > max
    return min if abs(min) ≥ abs(max)
flatArray(source) :=
    last ← 0
    for m ∈ source
        for i ∈ m
            R[last] ← i
            last ← last + 1
    R
# [area: Bar Chart]
HISTO_INFO := transpose(["0 :: histogram collumn count", "1 :: histogram step", "2 :: minimum value in set", "3 :: maximum value in set"])
histaCollumn(info) := info[0]
histaStep(info) := info[1]
minItem(info) := info[2]
maxItem(info) := info[3]
scaleHisto(info, offset) := info[2] + info[1]*offset
HISTO_STORAGE := transpose(["0 :: HISTO_INFO", "1 :: value array"])
hInfo(hista) := hista[0]
hValue(hista) := hista[1]
positionFromData(info, data) :=
    i ← floor((data - minItem(info))/histaStep(info))
    i ← i - 1 if i ≥ histaCollumn(info)
    i
HistInfoWithSize(set, count) :=
    R ← flatVerticalMatrix(length(HISTO_INFO))
    R[0] ← count
    R[2] ← min(set)
    R[3] ← max(set)
    R[1] ← (R[3] - R[2])/(R[0] - 1)
    R
getOptimalDivSizeOnSortSet(set, beginSize) :=
    setSize ← length(set)
    info ← HistInfoWithSize(set, beginSize)
    curentPos ← 0
    lastPos ← 0
    lastCheck ← set[0]
    for i ∈ set
        lastCheck ← i
        curentPos ← positionFromData(info, i)
        if ((curentPos - lastPos) > 1)
            {
                break
            }
        lastPos ← curentPos
        if (curentPos == beginSize - 1)
            {
                break
            }
    trace("finish with last position {0}, begin size {1}, current pos {2}, checked value {3}", lastPos, beginSize, curentPos, lastCheck)
    if ((lastPos == beginSize - 1) or (beginSize == 2))
        {
            return beginSize
        }
    getOptimalDivSizeOnSortSet(set, beginSize - 1)
HistInfo(set) := HistInfoWithSize(set, floor(sqrt(length(set))))
HhistogramaWithSize(set, size) :=
    info ← HistInfoWithSize(set, size)
    hista ← flatVerticalMatrix(length(HISTO_STORAGE))
    hista[0] ← info
    R[histaCollumn(info) - 1] ← 0
    for v ∈ set
        i ← positionFromData(info, v)
        R[i] ← R[i] + 1
    hista[1] ← R
    hista
getOptimalDivSize(set) :=
    set ← sort(set)
    getOptimalDivSizeOnSortSet(set, floor(sqrt(length(set))))
normolizeHistogram(hista) :=
    lastPos ← histaCollumn(hInfo(hista)) - 1
    value ← hValue(hista)
    sum ← sum(value[i], i = 0 .. lastPos)
    for i ∈ 0 .. lastPos
        R[i] ← value[i]/sum
    hista[1] ← R
    hista
Hhistograma(set) := HhistogramaWithSize(set, floor(sqrt(length(set))))
comulataSizeFromSet(set1, set2) := l(set1)*l(set2)/(l(set1) + l(set2))
comulataSizeFromSet(set1, set2) := floor(min(sqrt(set1), sqrt(set2)))
comulaIndex(item, minV, step) := floor((item - minV)/step)
comulataInfo(set, size) :=
    minV ← min(set)
    step ← (max(set) - minV)/size
    stepIncreace ← 1/l(set)
    R[size] ← 0
    for item ∈ set
        index ← comulaIndex(item, minV, step)
        for i ∈ index .. size
            R[i] ← R[i] + stepIncreace
    [R; step; minV]
getMaxComulaDiff(info) :=
    [comulsSize; hist1; histStep1; histMin1; hist2; histStep2; histMin2] ← info
    start ← min(histMin1, histMin2)
    end ← hist1[comulsSize] + hist2[comulsSize]
    step ← min(histStep1, histStep2)
    sum ← 0
    maxD ← 0
    while sum < end
        f ← comulaIndex(start, histMin1, histStep1)
        s ← comulaIndex(start, histMin2, histStep2)
        f ← comulsSize if f > comulsSize
        s ← comulsSize if s > comulsSize
        f ← 0 if f < 0
        s ← 0 if s < 0
        trace("{0} {1}", hist1[f], hist2[s])
        d ← |hist1[f] - hist2[s]|
        maxD ← d if d > maxD
        sum ← hist1[f] + hist2[s]
        start ← start + step
        trace("{0} {1}", start, end)
    maxD
getComulasFromInfo(info) := [info[1]; info[4]]
getComulasSizeFromInfo(info) := info[0]
comulataInfoForPair(set) :=
    count ← comulataSizeFromSet(set[0], set[1])
    flatArray([count; comulataInfo(set[0], count); comulataInfo(set[1], count)])
# [area: first part]
# [component: outputs fileData]
histograma := Hhistograma(fileData)
info := hInfo(histograma)
hist := hValue(histograma)
scale := minItem(info), minItem(info) + histaStep(info) .. maxItem(info)
histSize := length(hist)
testdE := mean(fileData)
testedV := stdev(fileData)
testD := var(fileData)
testedD := rnorm(1000, testdE, testedV)
testedD1 := rt(100, 2*testD/(testD - 1))
testedD1 := rgamma(100, testdE)
testdE = 0.0912233
hist1 := hValue(HhistogramaWithSize(testedD, 10))/10
testdE = 0.0912233
testedV = 1.8217
check(a, b) :=
    "H0" if a < b
    "H1" otherwise
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mean(testedD) = 0.103032
KChi := sum((hist[i] - hist1[i])^2/hist1[i], i = 0 .. histSize - 1)
linits := [qchisq(1 - 0.1, histSize - 2); qchisq(1 - 0.05, histSize - 2); qchisq(1 - 0.001, histSize - 2)]
result := [check(KChi, linits[0]); check(KChi, linits[1]); check(KChi, linits[2])]
KChi = 28.8943
linits = [13.3616; 15.5073; 26.1245]
result = ["H1"; "H1"; "H1"]
# [area: second part]
# [component: outputs fileData]
getCurrentData(fd) :=
    R[0] ← fd[:, 0]
    R[1] ← fd[:, 1]
    R
rawData := getCurrentData(fileData)
comulasInfo := comulataInfoForPair(rawData)
comulas := getComulasFromInfo(comulasInfo)
[comulsSize; hist1; histStep1; histMin1; hist2; histStep2; histMin2] := comulasInfo
scaleStart := min(histMin1, histMin2)
i := histMin1, histMin1 + histStep1 .. histMin1 + histStep1*comulsSize
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KWatch := comulsSize*getMaxComulaDiff(comulasInfo)^2
KWatch = 0.676
KCalc(α) := -ln(α)/2
limits := [KCalc(0.1); KCalc(0.05); KCalc(0.001)]
limits = [1.15129; 1.49787; 3.45388]
result := [check(KWatch, linits[0]); check(KWatch, linits[1]); check(KWatch, linits[2])]
result = ["H0"; "H0"; "H0"]
