# [area: UTIL]
flatHorizontalMatrix(size) :=
    empty(i, j) ← 0
    matrix(1, size, empty)
flatVerticalMatrix(size) :=
    empty(i, j) ← 0
    matrix(size, 1, empty)
emptyMarix(l1, l2) :=
    empty(i, j) ← 0
    matrix(l1, l2, empty)
# [area: Bar Chart]
HISTO_INFO := transpose(["0 :: histogram collumn count", "1 :: histogram step", "2 :: minimum value in set", "3 :: maximum value in set"])
histaCollumn(info) := info[0]
histaStep(info) := info[1]
minItem(info) := info[2]
maxItem(info) := info[3]
scaleHisto(info, offset) := info[2] + info[1]*offset
HISTO_STORAGE := transpose(["0 :: HISTO_INFO", "1 :: value array"])
hInfo(hista) := hista[0]
hValue(hista) := hista[1]
positionFromData(info, data) :=
    i ← floor((data - minItem(info))/histaStep(info))
    i ← i - 1 if i ≥ histaCollumn(info)
    i
HistInfoWithSize(set, count) :=
    R ← flatVerticalMatrix(length(HISTO_INFO))
    R[0] ← count
    R[2] ← min(set)
    R[3] ← max(set)
    R[1] ← (R[3] - R[2])/(R[0] - 1)
    R
getOptimalDivSizeOnSortSet(set, beginSize) :=
    setSize ← length(set)
    info ← HistInfoWithSize(set, beginSize)
    curentPos ← 0
    lastPos ← 0
    lastCheck ← set[0]
    for i ∈ set
        lastCheck ← i
        curentPos ← positionFromData(info, i)
        if ((curentPos - lastPos) > 1)
            {
                break
            }
        lastPos ← curentPos
        if (curentPos == beginSize - 1)
            {
                break
            }
    trace("finish with last position {0}, begin size {1}, current pos {2}, checked value {3}", lastPos, beginSize, curentPos, lastCheck)
    if ((lastPos == beginSize - 1) or (beginSize == 2))
        {
            return beginSize
        }
    getOptimalDivSizeOnSortSet(set, beginSize - 1)
HistInfo(set) := HistInfoWithSize(set, floor(sqrt(length(set))))
Hhistograma(set) :=
    info ← HistInfo(set)
    hista ← flatVerticalMatrix(length(HISTO_STORAGE))
    hista[0] ← info
    R[histaCollumn(info) - 1] ← 0
    for v ∈ set
        i ← positionFromData(info, v)
        R[i] ← R[i] + 1
    hista[1] ← R
    hista
getOptimalDivSize(set) :=
    set ← sort(set)
    getOptimalDivSizeOnSortSet(set, floor(sqrt(length(set))))
normolizeHistogram(hista) :=
    lastPos ← histaCollumn(hInfo(hista)) - 1
    value ← hValue(hista)
    sum ← sum(value[i], i = 0 .. lastPos)
    for i ∈ 0 .. lastPos
        R[i] ← value[i]/sum
    hista[1] ← R
    hista
# [area: Correlation]
GetCorrelationTable(set1, set2) :=
    size ← min(getOptimalDivSize(set1), getOptimalDivSize(set2))
    set1Info ← HistInfoWithSize(set1, size)
    set2Info ← HistInfoWithSize(set2, size)
    normalizIncrease ← 1
    R ← emptyMarix(size + 1, size + 1)
    for i ∈ 0 .. length(set1) - 1
        left ← positionFromData(set1Info, set1[i]) + 1
        top ← positionFromData(set2Info, set2[i]) + 1
        trace("item {0} left {1} right {2}", set2[i], left, top)
        R[left, top] ← R[left, top] + normalizIncrease
    for i ∈ 0 .. histaCollumn(set1Info) - 1
        R[i + 1, 0] ← scaleHisto(set1Info, i)
        R[0, i + 1] ← scaleHisto(set2Info, i)
    R
tableIterator(state, table, it) :=
    for r ∈ 1 .. rows(table) - 1
        for c ∈ 1 .. cols(table) - 1
            state ← it(state, table[0, c], table[r, 0], table[c, r])
    state
meanByTable(table) :=
    meanFun(state, X, Y, N) ←
        [XSum; YSum; Sum] ← state
        [XSum + X*N; YSum + Y*N; Sum + N]
    [XSum; YSum; Sum] ← tableIterator(flatVerticalMatrix(3), table, meanFun)
    [XSum/Sum, YSum/Sum]
dispersionByTable(table) :=
    [meanX, meanY] ← meanByTable(table)
    meanFun(state, X, Y, N) ←
        [XSum; YSum; Sum] ← state
        [XSum + ((X - meanX)^2)*N; YSum + ((Y - meanY)^2)*N; Sum + N]
    [XSum; YSum; Sum] ← tableIterator(flatVerticalMatrix(3), table, meanFun)
    [XSum/Sum, YSum/Sum]
corriliationTItemCount(table) := sum(sum(table[r, c], c = 1 .. cols(table) - 1), r = 1 .. rows(table) - 1)
significantPut(table) :=
    size ← rows(table)
    submatrix(table, 1, size - 1, 1, size - 1)
plotTable(table) :=
    d ← significantPut(table)
    fun(x, y) ←
        x ← floor(x)
        y ← floor(y)
        return NaN if x < 0
        return NaN if y < 0
        return NaN if x ≥ rows(d)
        return NaN if y ≥ rows(d)
        trace("X {0} Y {0}", x, y)
        d[x, y]
    fun
getCorrelation(table) :=
    [meanX, meanY] ← meanByTable(table)
    [Dx, Dy] ← dispersionByTable(table)
    meanFun(state, X, Y, N) ←
        [sum; Count] ← state
        [sum + ((X - meanX)*(Y - meanY))*N; Count + N]
    [sum; Count] ← tableIterator(flatVerticalMatrix(2), table, meanFun)
    (sum/Count)/(sqrt(Dx)*sqrt(Dy))
checkCorrelation(table, α) :=
    r ← getCorrelation(table)
    size ← corriliationTItemCount(table)
    k ← r/sqrt(1 - r^2)*sqrt(size - 2)
    t ← qt(1 - α, size - 2)
    [k, t]
# [area: Data Load]
filterFileData(set) := [set[:, 2]; set[:, 3]]
# [component: outputs fileData]
rawData := filterFileData(fileData)
table := GetCorrelationTable(rawData[0], rawData[1])
cleanTable := significantPut(table)
getCorrelation(table) = 0.144489
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# [component: inputs cleanTable]
# [component: outputs α]
α := str2num(α)
checkResult := transpose(checkCorrelation(table, α))
checkResult = [1.01167; 2.40658]
currentH(result) :=
    R ← "H1"
    R ← "H0" if result[0] < result[1]
    trace("Result {0}", R)
    R
currentHx(checkResult) =  # no stored result
